*HEADING
** Cyclic loading of polyurea dogbone (40 x 5 x 1 mm)
** Material: RNO atomistic surrogate (user subroutine vumat_rno.for)
** Units: SI (m, kg, s, Pa, K). Initial temperature 300 K.
** Geometry/mesh/BC per Sohail, Liu & Ghosh (2026), Sec. 4.
*PART, NAME=DOGBONE
*NODE
1, 0.000000e+00, -2.500000e-03, 0.000000e+00
2, 5.000000e-04, -2.500000e-03, 0.000000e+00
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*ELEMENT, TYPE=C3D8RT, ELSET=ALLEL
1, 1, 2, 5, 4, 22, 23, 26, 25
2, 2, 3, 6, 5, 23, 24, 27, 26
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*NSET, NSET=BOTTOM
1, 2, 3, 4, 5, 6
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*NSET, NSET=TOP
1177, 1178, 1179, 1180, 1181, 1182
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*NSET, NSET=GAUGE_MID
589, 590, 591, 592, 593, 594
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*NSET, NSET=ALLN, GENERATE
1, 1197, 1
*ELSET, ELSET=GAUGE, GENERATE
181, 492, 1
*SOLID SECTION, ELSET=ALLEL, MATERIAL=POLYUREA_RNO
,
*END PART
*MATERIAL, NAME=POLYUREA_RNO
*DENSITY
1120.0,
*SPECIFIC HEAT
1500.0,
*CONDUCTIVITY
0.19,
**  USER MATERIAL constants: E_eff, nu_eff (stable-dt estimate only),
**  T_ref, n_xi, beta_TQ, rho, cp, flag_transfer_learning_temp
*USER MATERIAL, CONSTANTS=8
2.8200e+09, 0.286, 300.0, 25, 0.9, 1120.0, 1500.0, 0
*INELASTIC HEAT FRACTION
0.9,
*DEPVAR
40
*ASSEMBLY, NAME=ASM
*INSTANCE, NAME=DB, PART=DOGBONE
*END INSTANCE
*NODE, NSET=RP_TOP
900001, 0.0005, 0.0, 0.040
*NODE, NSET=RP_BOT
900002, 0.0005, 0.0, 0.0
** distributing couplings tie each end face to its reference point (Sec. 4.1)
*SURFACE, TYPE=NODE, NAME=TOP_NS
DB.TOP,
*SURFACE, TYPE=NODE, NAME=BOT_NS
DB.BOTTOM,
*COUPLING, CONSTRAINT NAME=CPL_TOP, REF NODE=900001, SURFACE=TOP_NS
*DISTRIBUTING
*COUPLING, CONSTRAINT NAME=CPL_BOT, REF NODE=900002, SURFACE=BOT_NS
*DISTRIBUTING
*END ASSEMBLY
*INITIAL CONDITIONS, TYPE=TEMPERATURE
DB.ALLN, 300.0
** amplitude: 3 sinusoidal cycles, period 20 us, 2 us cosine ramp (Fig. 7)
*AMPLITUDE, NAME=SINE3, DEFINITION=TABULAR
0.000e+00, 0.00000, 2.500e-07, 0.00299, 5.000e-07, 0.02291, 7.500e-07, 0.07205
1.000e-06, 0.15451, 1.250e-06, 0.26457, 1.500e-06, 0.38751, 1.750e-06, 0.50261
2.000e-06, 0.58779, 2.250e-06, 0.64945, 2.500e-06, 0.70711, 2.750e-06, 0.76041
3.000e-06, 0.80902, 3.250e-06, 0.85264, 3.500e-06, 0.89101, 3.750e-06, 0.92388
4.000e-06, 0.95106, 4.250e-06, 0.97237, 4.500e-06, 0.98769, 4.750e-06, 0.99692
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6.000e-05, -0.00000
*BOUNDARY
900002, 1, 6, 0.0
900001, 1, 2, 0.0
900001, 4, 6, 0.0
*STEP, NAME=CYCLIC, NLGEOM=YES
*DYNAMIC TEMPERATURE-DISPLACEMENT, EXPLICIT
, 6.0E-05
*BULK VISCOSITY
0.06, 1.2
*BOUNDARY, AMPLITUDE=SINE3
900001, 3, 3, 2.0000e-05
*OUTPUT, FIELD, NUMBER INTERVAL=60
*NODE OUTPUT
U, V, NT
*ELEMENT OUTPUT, ELSET=DB.ALLEL
S, LE, SDV, TEMP
*OUTPUT, HISTORY, TIME INTERVAL=1.0E-7
*NODE OUTPUT, NSET=RP_TOP
U3, RF3
*ENERGY OUTPUT
ALLWK, ALLIE, ALLPD, ALLSE, ALLKE
*END STEP
