*HEADING
** Plate impact: rigid projectile 10 x 10 x 20 mm @ 20 m/s on polyurea plate 40 x 40 x 10 mm
** Material: RNO atomistic surrogate (user subroutine vumat_rno.for)
** Units: SI (m, kg, s, Pa, K). Initial temperature 300 K.
** Geometry/mesh/BC per Sohail, Liu & Ghosh (2026), Sec. 4.
*PART, NAME=PLATE
*NODE
1, -2.000000e-02, -2.000000e-02, 0.000000e+00
2, -1.840000e-02, -2.000000e-02, 0.000000e+00
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*ELEMENT, TYPE=C3D8RT, ELSET=PLATEEL
1, 1, 2, 28, 27, 677, 678, 704, 703
2, 2, 3, 29, 28, 678, 679, 705, 704
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*NSET, NSET=BACK
1, 2, 3, 4, 5, 6
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*NSET, NSET=CENTER_BACK
*NSET, NSET=PLATEN, GENERATE
1, 6084, 1
*SOLID SECTION, ELSET=PLATEEL, MATERIAL=POLYUREA_RNO, CONTROLS=HGPOLY
,
*END PART
*PART, NAME=IMPACTOR
*NODE
1, -5.000000e-03, -5.000000e-03, 1.000000e-02
2, -2.500000e-03, -5.000000e-03, 1.000000e-02
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*ELEMENT, TYPE=C3D8R, ELSET=IMPEL
1, 1, 2, 7, 6, 26, 27, 32, 31
2, 2, 3, 8, 7, 27, 28, 33, 32
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*NSET, NSET=IMPN, GENERATE
1, 200, 1
*SOLID SECTION, ELSET=IMPEL, MATERIAL=STEEL
,
*END PART
*MATERIAL, NAME=POLYUREA_RNO
*DENSITY
1120.0,
*SPECIFIC HEAT
1500.0,
*CONDUCTIVITY
0.19,
**  USER MATERIAL constants: E_eff, nu_eff (stable-dt estimate only),
**  T_ref, n_xi, beta_TQ, rho, cp, flag_transfer_learning_temp
*USER MATERIAL, CONSTANTS=8
2.8200e+09, 0.286, 300.0, 25, 0.9, 1120.0, 1500.0, 0
*INELASTIC HEAT FRACTION
0.9,
*DEPVAR
40
*MATERIAL, NAME=STEEL
*DENSITY
7850.0,
*ELASTIC
2.10E11, 0.3
*SURFACE INTERACTION, NAME=FRICTIONLESS
*FRICTION
0.0,
*SURFACE BEHAVIOR, PRESSURE-OVERCLOSURE=LINEAR
1.0E11,
*SECTION CONTROLS, NAME=HGPOLY, HOURGLASS=RELAX STIFFNESS
,,
0.02, 0.02, 0.02
*ASSEMBLY, NAME=ASM
*INSTANCE, NAME=PL, PART=PLATE
*END INSTANCE
*INSTANCE, NAME=IM, PART=IMPACTOR
*END INSTANCE
*SURFACE, NAME=PLATE_S, TYPE=ELEMENT
PL.PLATEEL,
*SURFACE, NAME=IMP_S, TYPE=ELEMENT
IM.IMPEL,
*END ASSEMBLY
*INITIAL CONDITIONS, TYPE=TEMPERATURE
PL.PLATEN, 300.0
*INITIAL CONDITIONS, TYPE=VELOCITY
IM.IMPN, 3, -20.0
*BOUNDARY
PL.BACK, 1, 3, 0.0
*STEP, NAME=IMPACT, NLGEOM=YES
*DYNAMIC TEMPERATURE-DISPLACEMENT, EXPLICIT
, 3.0E-04
*BULK VISCOSITY
0.06, 1.2
*CONTACT
*CONTACT INCLUSIONS
PLATE_S, IMP_S
*CONTACT PROPERTY ASSIGNMENT
, , FRICTIONLESS
*OUTPUT, FIELD, NUMBER INTERVAL=150
*NODE OUTPUT
U, V, RF, NT
*ELEMENT OUTPUT, ELSET=PL.PLATEEL
S, LE, SDV, TEMP
*OUTPUT, HISTORY, TIME INTERVAL=2.0E-7
*ENERGY OUTPUT
ALLKE, ALLIE, ALLPD, ALLSE, ETOTAL
*END STEP
