*HEADING
** Taylor impact: polyurea cylinder D10 x 30 mm, V = 100 m/s, rigid wall 20 x 20 x 5 mm
** Material: RNO atomistic surrogate (user subroutine vumat_rno.for)
** Units: SI (m, kg, s, Pa, K). Initial temperature 300 K.
** Geometry/mesh/BC per Sohail, Liu & Ghosh (2026), Sec. 4.
*PART, NAME=PROJ
*NODE
1, -2.338536e-03, -2.338536e-03, 0.000000e+00
2, -1.403122e-03, -2.443103e-03, 0.000000e+00
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*ELEMENT, TYPE=C3D8RT, ELSET=PROJEL
1, 1, 2, 8, 7, 97, 98, 104, 103
2, 2, 3, 9, 8, 98, 99, 105, 104
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*NSET, NSET=PROJN, GENERATE
1, 2208, 1
*SOLID SECTION, ELSET=PROJEL, MATERIAL=POLYUREA_RNO, CONTROLS=HGPOLY
,
*END PART
*PART, NAME=WALL
*NODE
1, -1.000000e-02, -1.000000e-02, -5.000000e-03
2, -8.571429e-03, -1.000000e-02, -5.000000e-03
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*ELEMENT, TYPE=C3D8R, ELSET=WALLEL
1, 1, 2, 17, 16, 331, 332, 347, 346
2, 2, 3, 18, 17, 332, 333, 348, 347
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*NSET, NSET=WALLN
1, 2, 3, 4, 5, 6
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*NSET, NSET=WALLBASE
1, 2, 3, 4, 5, 6
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*SOLID SECTION, ELSET=WALLEL, MATERIAL=STEEL
,
*END PART
*MATERIAL, NAME=POLYUREA_RNO
*DENSITY
1120.0,
*SPECIFIC HEAT
1500.0,
*CONDUCTIVITY
0.19,
**  USER MATERIAL constants: E_eff, nu_eff (stable-dt estimate only),
**  T_ref, n_xi, beta_TQ, rho, cp, flag_transfer_learning_temp
*USER MATERIAL, CONSTANTS=8
2.8200e+09, 0.286, 300.0, 25, 0.9, 1120.0, 1500.0, 0
*INELASTIC HEAT FRACTION
0.9,
*DEPVAR
40
*MATERIAL, NAME=STEEL
*DENSITY
7850.0,
*ELASTIC
2.10E11, 0.3
*SURFACE INTERACTION, NAME=FRICTIONLESS
*FRICTION
0.0,
*SECTION CONTROLS, NAME=HGPOLY, HOURGLASS=VISCOUS
,,
*ASSEMBLY, NAME=ASM
*INSTANCE, NAME=P, PART=PROJ
*END INSTANCE
*INSTANCE, NAME=W, PART=WALL
*END INSTANCE
*SURFACE, NAME=PROJ_S, TYPE=ELEMENT
P.PROJEL,
*SURFACE, NAME=WALL_S, TYPE=ELEMENT
W.WALLEL,
*END ASSEMBLY
*INITIAL CONDITIONS, TYPE=TEMPERATURE
P.PROJN, 300.0
W.WALLN, 300.0
*INITIAL CONDITIONS, TYPE=VELOCITY
P.PROJN, 3, -100.0
*BOUNDARY
W.WALLBASE, 1, 3, 0.0
*STEP, NAME=IMPACT, NLGEOM=YES
*DYNAMIC TEMPERATURE-DISPLACEMENT, EXPLICIT
, 3.5E-05
*BULK VISCOSITY
0.06, 1.2
** hard normal / frictionless tangential contact (Sec. 4.2)
*CONTACT
*CONTACT INCLUSIONS
PROJ_S, WALL_S
*CONTACT PROPERTY ASSIGNMENT
, , FRICTIONLESS
*OUTPUT, FIELD, NUMBER INTERVAL=160
*NODE OUTPUT
U, V, RF, NT
*ELEMENT OUTPUT, ELSET=P.PROJEL
S, LE, SDV, TEMP
*OUTPUT, HISTORY, TIME INTERVAL=5.0E-8
*ENERGY OUTPUT
ALLKE, ALLIE, ALLPD, ALLSE, ETOTAL
*OUTPUT, FIELD, TIME INTERVAL=1.0E-7
*NODE OUTPUT
RF,
*END STEP
